# V6A LAMMPS TTM-MD silicon slab pilot
# case: ttm_initial_pulse_5uj_equiv
# Generated by scripts/build_v60_lammps_ttm_md_pilot.py

units           metal
dimension       3
boundary        p p p
atom_style      atomic

variable        alat equal 5.431000
lattice         diamond ${alat}
region          box block 0 12 0 12 0 56 units lattice
create_box      1 box
region          si block 0 12 0 12 0 28 units lattice
create_atoms    1 region si

mass            1 28.085500
pair_style      sw
pair_coeff      * * Si.sw Si

neighbor        2.0 bin
neigh_modify    delay 0 every 1 check yes

region          bottom block INF INF INF INF INF 8.000000 units box
region          bath block INF INF INF INF 8.000000 20.000000 units box
group           bottom region bottom
group           bath region bath
group           mobile subtract all bottom

compute         peatom all pe/atom
compute         keatom all ke/atom
compute         satom all stress/atom NULL

timestep        0.00025000
velocity        mobile create 300.000 4928459 mom yes rot yes dist gaussian
velocity        bottom set 0.0 0.0 0.0
fix             hold bottom setforce 0.0 0.0 0.0

min_style       cg
minimize        1.0e-8 1.0e-10 500 5000

fix             nve mobile nve
fix             bathfix bath langevin 300.0 300.0 0.1 827364 zero yes
thermo          200
thermo_style    custom step time temp pe ke etotal press
run             8000
unfix           bathfix

# TTM atomic-electron coupling. Requires a LAMMPS build with EXTRA-FIX.
# For full laser-source ablation, V6B should switch this to fix ttm/mod
# with the generated v60_ttm_mod_parameters.txt file.
fix             ttm all ttm 24681357 1 1 10 0.1 0 2 4 4 28 infile v60_ttm_initial_pulse_5uj_equiv_Te_init.dat outfile 2000 Te_out

dump            atomdump all custom 2000 dump.v60_ttm_initial_pulse_5uj_equiv.lammpstrj id type x y z vx vy vz c_keatom c_peatom c_satom[1] c_satom[2] c_satom[3] c_satom[4] c_satom[5] c_satom[6]
dump_modify     atomdump sort id
run             80000

write_data      final.v60_ttm_initial_pulse_5uj_equiv.data

unfix           ttm
unfix           nve
unfix           hold
