# V8 Si TTM-MD physical model update
# case: fluence_1p0_300ps_small_physical
# Generated by scripts/build_v80_lammps_ttm_md_physical_model.py
#
# fix ttm/mod requires periodic simulation-box boundaries.  The top surface is
# represented by a large vacuum slab inside a periodic z box; this is acceptable
# for short checks only if no ejecta crosses the vacuum and re-enters the slab.

units           metal
dimension       3
boundary        p p p
atom_style      atomic

variable        alat equal 5.431000
lattice         diamond ${alat}
region          box block 0 19 0 19 0 100 units lattice
create_box      1 box
region          si block 0 19 0 19 0 55 units lattice
create_atoms    1 region si

mass            1 28.085500
pair_style      sw
pair_coeff      * * Si.sw Si

neighbor        2.0 bin
neigh_modify    every 5 delay 0 check yes

region          bottom block INF INF INF INF INF 8.000000 units box
region          bath block INF INF INF INF 8.000000 20.000000 units box
group           bottom region bottom
group           bath region bath
group           mobile subtract all bottom

compute         peatom all pe/atom
compute         keatom all ke/atom
compute         satom all stress/atom NULL

timestep        0.00010000
velocity        mobile create 300.0 4928459 mom yes rot yes dist gaussian
velocity        bottom set 0.0 0.0 0.0
fix             hold bottom setforce 0.0 0.0 0.0

min_style       cg
minimize        1.0e-8 1.0e-10 500 5000

fix             nve mobile nve
fix             bathfix bath langevin 300.0 300.0 1.000000 827364 zero yes
thermo          1000
thermo_style    custom step time temp pe ke etotal press
run             20000
unfix           bathfix

reset_timestep  0
fix             twotemp all ttm/mod 97531864 v80_fluence_1p0_300ps_small_physical.ttm_mod 10 10 80 set 300.000 outfile 10000 Te_out

dump            atomdump_early all custom 10000 dump.v80_fluence_1p0_300ps_small_physical.early.lammpstrj id type x y z vx vy vz c_keatom c_peatom c_satom[1] c_satom[2] c_satom[3] c_satom[4] c_satom[5] c_satom[6]
dump_modify     atomdump_early sort id
run             1000000
undump          atomdump_early
dump            atomdump_late all custom 50000 dump.v80_fluence_1p0_300ps_small_physical.late.lammpstrj id type x y z vx vy vz c_keatom c_peatom c_satom[1] c_satom[2] c_satom[3] c_satom[4] c_satom[5] c_satom[6]
dump_modify     atomdump_late sort id
run             2000000
undump          atomdump_late

write_data      final.v80_fluence_1p0_300ps_small_physical.data

unfix           twotemp
unfix           nve
unfix           hold
